<Node name="HumanNode">
  <MeshObjLoader name="human_loader" filename="../meshes/human.obj"/>
    <MechanicalObject name="human-states" src="@human_loader" />
    <TetrahedronSetTopologyContainer name="HumanTetra" src="@human_loader" />
    <TetrahedronSetGeometryAlgorithms name="HumanAlgos" template="Vec3d"  drawTetrahedra="1"/>
    <OglModel name="HumanVisu" src="@human_loader" position="@human_loader.position" color="red" />
</Node>
