<?xml version="1.0"?>
<Node name="SphereNode">
	<EulerImplicitSolver rayleighStiffness="0.01"  rayleighMass="0.1" />
	<CGLinearSolver template="GraphScattered" iterations="25" tolerance="1e-12"  threshold="1e-18"  />
    <!-- Above from TORUS FEM -->
  <MeshVTKLoader name="sphere_loader" filename="../../../../ros/srs_traj_opt/patient_description/meshes/sphere.vtk"/>
  <MechanicalObject name="spherical-states" src="@sphere_loader" template="Vec3d" scale="1.0"
     externalForce="0 0 0"  restScale="1"  translation="0 0 0"  scale3d="1 1 1" />

	<UniformMass totalMass="10" />
  <Node name="SphereVisu" >
    <OglModel name="SphereVisual"  src="@../sphere_loader" translation="0 0 0"  color="blue" dx="-15" dy="190" dz="40"/>
    <!-- <BarycentricMapping input="@.." output="@SphereVisual" /> -->
  </Node>
<Node 	 name="SphereCollis"  >
  <MeshVTKLoader name="sphere-collis-loader"  filename="../../../../ros/srs_traj_opt/patient_description/meshes/sphere.vtk" />
  <MeshTopology name="meshTopology"  />
  <!-- scale="1.0" -->
  <MechanicalObject template="Vec3d" name="sphere-collis-states"  velocity="0 0 0"  force="0 0 0"  externalForce="0 0 0" />

	<!-- <BarycentricMapping /> -->
</Node>
</Node>
